// SBML level 3 version 1

model pancreas_min_1(Vpa, Vext, Aext_glc, Aext_lac, Aext_ins, Aext_cpep)
  // Pancreas glucose model
  // Description
  // Pancreas tissue glucose metabolism encoded in SBML format.
  // The content of this model has been carefully created in a manual research effort.
  // This file has been created by Matthias Koenig.
  // Terms of use
  // Copyright © 2019 Matthias Koenig.
  // Redistribution and use of any part of this model, with or without modification, are permitted provided that the following conditions are met:
  // Redistributions of this SBML file must retain the above copyright notice, this list of conditions and the following disclaimer.
  // Redistributions in a different form must reproduce the above copyright notice, this list of conditions and the following disclaimer in the documentation and/or other materials provided with the distribution.
  // This model is distributed in the hope that it will be useful, but WITHOUT ANY WARRANTY; without even the implied warranty of MERCHANTABILITY or FITNESS FOR A PARTICULAR PURPOSE.
  // model units - substance: mmole, time: min, volume: l, area: m2, length: m, extent: mmole

  // Compartments:
  compartment Vpa = 0.5 litre; Vpa is "pancreas tissue";
  compartment Vext = 0.1 litre; Vext is "pancreas blood";

  // Species:
  substanceOnly species $Aext_glc in Vext = 5*Vext; Aext_glc is "glucose";
  substanceOnly species Aext_lac in Vext = 0.8*Vext; Aext_lac is "lactate";
  substanceOnly species Aext_ins in Vext = 6e-5*Vext; Aext_ins is "insulin";
  substanceOnly species Aext_cpep in Vext = 0; Aext_cpep is "c-peptide";
  substanceOnly species Apa_glc in Vpa = 5*Vpa; Apa_glc is "glucose";
  substanceOnly species Apa_lac in Vpa = 0.8*Vpa; Apa_lac is "lactate";

  // Parameters:
  Cext_glc has mM; Cext_glc is "glucose concentration (Vext)";
  Cext_lac has mM; Cext_lac is "lactate concentration (Vext)";
  Cext_ins has mM; Cext_ins is "insulin concentration (Vext)";
  Cext_cpep has mM; Cext_cpep is "c-peptide concentration (Vext)";
  Cpa_glc has mM; Cpa_glc is "glucose concentration (Vpa)";
  Cpa_lac has mM; Cpa_lac is "lactate concentration (Vpa)";
  GLCIM_Vmax = 100 mmole_per_minl; GLCIM_Vmax is "Glucose import";
  GLCIM_Km = 1 mM;
  LACEX_Vmax = 100 mmole_per_minl; LACEX_Vmax is "Lactate import";
  LACEX_Km = 0.5 mM;
  GLC2LAC_Vmax = 0.1 mmole_per_minl; GLC2LAC_Vmax is "Glucose utilization";
  GLC2LAC_Km = 4.5 mM;
  IRS_Vmax = 1.6e-6 mmole_per_minl; IRS_Vmax is "Insulin secretion";
  IRS_n_glc = 4 dimensionless;
  IRS_Km_glc = 7 mM;

  // Assignment rules:
  Cext_glc := Aext_glc/Vext;
  Cext_lac := Aext_lac/Vext;
  Cext_ins := Aext_ins/Vext;
  Cext_cpep := Aext_cpep/Vext;
  Cpa_glc := Apa_glc/Vpa;
  Cpa_lac := Apa_lac/Vpa;

  // Reactions:
  GLCIM: $Aext_glc -> Apa_glc; Vpa*GLCIM_Vmax/GLCIM_Km*(Cext_glc - Cpa_glc)/(1 + Cext_glc/GLCIM_Km + Cpa_glc/GLCIM_Km); GLCIM is "glucose import";
  LACEX: Apa_lac -> Aext_lac; Vpa*LACEX_Vmax/LACEX_Km*(Cpa_lac - Cext_lac)/(1 + Cext_lac/LACEX_Km + Cpa_lac/LACEX_Km); LACEX is "lactate export";
  GLC2LAC: Apa_glc => 2 Apa_lac; Vpa*GLC2LAC_Vmax*(Cpa_glc/(Cpa_glc + GLC2LAC_Km)); GLC2LAC is "glycolysis";
  IRS: => Aext_ins + Aext_cpep; Vpa*IRS_Vmax*Cpa_glc^IRS_n_glc/(Cpa_glc^IRS_n_glc + IRS_Km_glc^IRS_n_glc); IRS is "IRS insulin secretion";  // modifiers: Apa_glc

  // Unit definitions:
  unit l = litre;
  unit min = 60 second;
  unit s = second;
  unit kg = 1000 gram;
  unit m = metre;
  unit m2 = metre^2;
  unit mg = 1e-3 gram;
  unit ml = 1e-3 litre;
  unit mmole = 1e-3 mole;
  unit per_min = 1 / (60 second);
  unit mM = 1e-3 mole / litre;
  unit mmole_per_min = 1e-3 mole / (60 second);
  unit mmole_per_minl = 1e-3 mole / (60 second * litre);
end
