// SBML level 3 version 1
// Created with https://github.com/matthiaskoenig/sbmlutils.

model pancreas_min_3(Vpa, Vext, Cext_glc, Cext_lac, Cext_ins, Cext_cpep)
  // Pancreas minimal glucose model version 3
  // Pancreas minimal glucose model.
  // Terms of use
  // The content of this model has been carefully created in a manual research effort. This file has been created by Matthias König using sbmlutils . For questions contact koenigmx@hu-berlin.de.
  // Copyright © 2021 Matthias König.
  // This work is licensed under a Creative Commons Attribution 4.0 International License.
  // Redistribution and use of any part of this model, with or without modification, are permitted provided that the following conditions are met:
  // Redistributions of this SBML file must retain the above copyright notice, this list of conditions and the following disclaimer.
  // Redistributions in a different form must reproduce the above copyright notice, this list of conditions and the following disclaimer in the documentation and/or other materials provided with the distribution.
  // This model is distributed in the hope that it will be useful, but WITHOUT ANY WARRANTY; without even the implied warranty of MERCHANTABILITY or FITNESS FOR A PARTICULAR PURPOSE.
  // model units - substance: mmole, time: min, volume: litre, area: m2, length: metre, extent: mmole

  // Compartments:
  compartment Vpa = 0.5 litre; Vpa is "pancreas tissue";  // SBO:0000290 FMA:7198 ncit:C12393 UBERON:0001264
  compartment Vext = 5 litre; Vext is "pancreas blood";  // SBO:0000290 FMA:62970 ncit:C12434 BTO:0000089
  compartment Vmem = 1 m2; Vmem is "pancreas plasma membrane";  // SBO:0000290 FMA:63841 ncit:C13735

  // Species:
  species $Cext_glc in Vext = 5; Cext_glc is "glucose";  // SBO:0000247 CHEBI:17234 ncit:C2831
  species Cext_lac in Vext = 0.8; Cext_lac is "lactate";  // SBO:0000247 CHEBI:24996
  species Cext_ins in Vext = 6e-8; Cext_ins is "insulin";  // SBO:0000245 CHEBI:24996 ncit:C2271 uniprot:P01308
  species Cext_cpep in Vext = 0; Cext_cpep is "c-peptide";  // SBO:0000245 CHEBI:80332 ncit:C94608; isVersionOf uniprot:P01308
  species Cpa_glc in Vpa = 5; Cpa_glc is "glucose";  // SBO:0000247 CHEBI:17234 ncit:C2831
  species Cpa_lac in Vpa = 0.8; Cpa_lac is "lactate";  // SBO:0000247 CHEBI:24996

  // Parameters:
  GLCIM_Vmax = 100 mmole_per_minl; GLCIM_Vmax is "Vmax glucose import";  // SBO:0000186
  GLCIM_Km = 1 mM; GLCIM_Km is "Km glucose import";  // SBO:0000027
  LACEX_Vmax = 100 mmole_per_minl; LACEX_Vmax is "Vmax lactate export";  // SBO:0000186
  LACEX_Km = 0.5 mM; LACEX_Km is "Km lactate export";  // SBO:0000027
  GLC2LAC_Vmax = 0.1 mmole_per_minl; GLC2LAC_Vmax is "Vmax glucose utilization (glycolysis)";  // SBO:0000186
  GLC2LAC_Km = 4.5 mM; GLC2LAC_Km is "Km effective glucose utilization (glycolysis)";  // SBO:0000027
  IRS_Vmax = 1.6e-6 mmole_per_minl; IRS_Vmax is "Vmax insulin secretion";  // SBO:0000186
  IRS_n_glc = 4 dimensionless; IRS_n_glc is "Hill coeffient glucose in insulin secretion";  // SBO:0000190
  IRS_Km_glc = 7 mM; IRS_Km_glc is "Km glucose insulin secretion";  // SBO:0000027

  // Reactions:
  GLCIM: $Cext_glc -> Cpa_glc; Vpa*GLCIM_Vmax/GLCIM_Km*(Cext_glc - Cpa_glc)/(1 + Cext_glc/GLCIM_Km + Cpa_glc/GLCIM_Km); GLCIM is "glucose import";  // SBO:0000655
  LACEX: Cpa_lac -> Cext_lac; Vpa*LACEX_Vmax/LACEX_Km*(Cpa_lac - Cext_lac)/(1 + Cext_lac/LACEX_Km + Cpa_lac/LACEX_Km); LACEX is "lactate export";  // SBO:0000655
  GLC2LAC: Cpa_glc => 2 Cpa_lac; Vpa*GLC2LAC_Vmax*(Cpa_glc/(Cpa_glc + GLC2LAC_Km)); GLC2LAC is "glycolysis";  // SBO:0000176
  // Insulin secretion
  // equimolar secretion of insulin and c-peptide
  // hill kinetics of secretion depending on glucose
  IRS: => Cext_ins + Cext_cpep; Vpa*IRS_Vmax*Cpa_glc^IRS_n_glc/(Cpa_glc^IRS_n_glc + IRS_Km_glc^IRS_n_glc); IRS is "IRS insulin secretion";  // modifiers: Cpa_glc; SBO:0000655

  // Unit definitions:
  unit kg = 1000 gram;
  unit m2 = metre^2; m2 is "meter^2";
  unit mM = 1e-3 mole / litre; mM is "mmole/liter";
  unit mg = 1e-3 gram;
  unit min = 60 second;
  unit ml = 1e-3 litre;
  unit mmole = 1e-3 mole;
  unit mmole_per_min = 1e-3 mole / (60 second); mmole_per_min is "mmole/min";
  unit mmole_per_minl = 1e-3 mole / (60 second * litre); mmole_per_minl is "mmole/min/l";
  unit per_min = 1 / (60 second); per_min is "1/min";
  unit s = second;
end
